# Initialisation

variable		T equal 300

units			real
atom_style		full
boundary		p p p
pair_style		lj/cut 14

bond_style		harmonic
angle_style		harmonic
dihedral_style	opls
improper_style	harmonic

special_bonds	lj 0.0 0.0 0.5

# System definition
read_data		sheet.lammps
include			PARM.lammps

# Simulation settings

group			gcar type 1
variable		xmax equal bound(gcar,xmax)-0.5
variable		xmin equal bound(gcar,xmin)+0.5
region			rtop block ${xmax} INF INF INF INF INF
region			rbot block INF ${xmin} INF INF INF INF
region			rmid block ${xmin} ${xmax} INF INF INF INF

group			gtop region rtop
group			gbot region rbot
group			gmid region rmid

velocity		gmid create ${T} 48455 mom yes rot yes
fix				mynve all nve
compute			Tmid gmid temp
fix				myber gmid temp/berendsen ${T} ${T} 100
fix_modify		myber temp Tmid

fix 			mysf1 gtop setforce 0 NULL 0
fix 			mysf2 gbot setforce 0 NULL 0
velocity		gtop set 0 NULL 0
velocity		gbot set 0 NULL 0

variable		L equal xcm(gtop,x)-xcm(gbot,x)
fix 			at1 all ave/time 10 100 1000 v_L file length.dat
fix 			at2 all ave/time 10 100 1000 f_mysf1[1] f_mysf2[1] file force.dat
dump 			mydmp all atom 1000 dump.lammpstrj

thermo			100
thermo_modify 	temp Tmid

# use the compute bond/local to extract all the distance
compute 		mybond all bond/local dist engpot

# export the histogram of the bond length and bond energy every 5000 timesteps
# using 10 400 5000, we disregard the first 1000 step
fix 			myavh1 all ave/histo 10 400 5000 1.25 2.0 100 c_mybond[1] mode vector file bondlenght.histo
fix 			myavh2 all ave/histo 10 400 5000 0 60 100 c_mybond[2] mode vector file bondenergy.histo

# Run
timestep		1.0
run				5000

variable 		var loop 50
label 			loop
displace_atoms	gtop move 0.1 0 0
displace_atoms	gbot move -0.1 0 0
run				5000
next			var
jump 			SELF loop

run				5000 # add an extra final step
