# LAMMPS input script
# author : Simon Gravelle
# lammpstutorials.github.io

# Initialization
units lj
dimension 3
atom_style atomic
pair_style lj/cut 2.5
boundary p p p

# Let us start from the equilibrated configuration
# Note that the equilibrated configuration contains the
# atoms velocities, i.e. it contains the temperature.
read_data system.data

# Simulation settings (not saved by write_data, so must be redefined)
mass 1 1
mass 2 1
pair_coeff 1 1 1.0 1.0
pair_coeff 2 2 0.5 3.0
neigh_modify every 1 delay 5 check yes
# Run
# No need to recreate the velocity, system is already equilibrated
# velocity all create 1.0 4928459 mom yes rot yes dist gaussian

fix mynve all nve

# let us extract the total energy of the system over time
variable total_energy equal etotal
fix myat1 all ave/time 10 100 1000 v_total_energy file totalenergyvstime.dat
# optionally, kinetic energy and potential energy can be extracted separately
variable kinetic_energy equal ke
fix myat2 all ave/time 10 100 1000 v_kinetic_energy file kineticenergyvstime.dat
variable potential_energy equal pe
fix myat3 all ave/time 10 100 1000 v_potential_energy file potentialenergyvstime.dat

dump mydmp all atom 500 dump.lammpstrj

# No fix langevin, i.e. no thermostat
# since langevin controls the temperature
# fix mylgv all langevin 1.0 1.0 0.1 1530917 zero yes
timestep 0.001 # reduce the timestep for better energy conservation
thermo 50000
run 500000

# Plot the total energy from the fix myat1 as a function of time.
# It must remain constant (appart from thermal noise) with time.
