# LAMMPS input script
# author : Simon Gravelle
# lammpstutorials.github.io

boundary s p p
pair_style lj/cut 2.5

# System definition
lattice fcc 1
region simulation_box block -23 23 -5 5 -5 5
create_box 5 simulation_box
region piston_left block -21 -20 INF INF INF INF
region fluid_left block -18 -2 INF INF INF INF
region membrane block -0.25 0.25 INF INF INF INF
region fluid_right block 2 18 INF INF INF INF
region piston_right block 20 21 INF INF INF INF

# Place the atoms
create_atoms 1 region piston_left
create_atoms 2 region membrane
create_atoms 3 region piston_right
create_atoms 4 random 1000 654514 fluid_left
create_atoms 4 random 550 654514 fluid_right
# no need for solute as the flux will be induced by mechanical
# pressure difference
#create_atoms 5 random 50 424514 fluid_right

# Simulation settings
mass * 1
pair_coeff 1*3 1*3 1.0 1.0 # solid-solid
pair_coeff 4 4 1.0 1.0 # solvent-solvent
pair_coeff 5 5 2.0 3.0 # solute-solute
pair_coeff 1*3 4 0.8 1 # solid-solvent
pair_coeff 2 5 0.1 3.0 # membrane-solute

# Output
dump mydmp all atom 1 dump.lammpstrj
thermo 10

# Run
minimize 1.0e-4 1.0e-6 1000 10000
write_data data.lammps pair ij
